<?xml version="1.0"?>
<?xml-stylesheet href="JSBSim.xsl" type="application/xml"?>
<fdm_config name="C-17 Globemaster III" version="2.0" release="BETA">

  <fileheader>
    <author>IH-COL, D. Waggoner, Jon Bourgeois, Adam Fothergill</author>
    <email>iahmcol@thejabberwocky.net</email>
    <filecreationdate>2022-08-22</filecreationdate>
    <description>C-17 Globemaster III: USAF Strategic Airlifter</description>
    <version>2.0</version>
  </fileheader>
  <!-- GPL version 2.0 or higher -->
  <!--
      File:     C-17.xml
      Inputs:
      name:          C-17A Globemaster III
      type:          four-engine transonic transport
      max weight:    585000 lb
      wing span:     169 ft
      length:        174 ft
      wing area:     3800 sq-ft
      gear type:     tricycle
      retractable?:  yes
      # engines:     4
      engine type:   turbine
      engine layout: wings
      yaw damper?    yes
      Outputs:
      wing loading:  153.95 lb/sq-ft
      CL-alpha:      5.0446 per radian
      CL-0:          0.2
      CL-max:        1.2
      CD-0:          0.017
      K:             0.042

  -->
  <metrics>
    <length unit="FT">173.92</length>
    <diameter unit="FT">33.67</diameter>
    <wingarea unit="FT2">3800</wingarea>
    <wingspan unit="FT">170.75</wingspan>
    <chord unit="FT">25.9</chord>
    <wing_incidence unit="DEG">3.0</wing_incidence>
    <wing_sweep unit="DEG">25.0</wing_sweep>
    <wing_anhedral unit="DEG">3.0</wing_anhedral>
    <htailarea unit="FT2">845</htailarea>
    <htailarm unit="FT">94.48</htailarm>
    <ht_sweep unit="DEG">27.0</ht_sweep>
    <ht_anhedral unit="DEG">3.0</ht_anhedral>
    <vtailarea unit="FT2">685</vtailarea>
    <vtailarm unit="FT">67.25</vtailarm>
    <vt_sweep unit="DEG">41.0</vt_sweep>
    <location name="AERORP" unit="FT">
      <x>63.21503</x>
      <y>0</y>
      <z>7.392472</z>
    </location>
    <location name="EYEPOINT" unit="FT">
      <x>7.54</x>
      <y>-2.74</y>
      <z>4.795</z>
    </location>
    <location name="VRP" unit="FT">
      <x>75.26</x>
      <y>0</y>
      <z>0</z>
    </location>
  </metrics>

  <mass_balance>
    <ixx unit="SLUG*FT2">5960958.7007</ixx>
    <iyy unit="SLUG*FT2">7090719.1211</iyy>
    <izz unit="SLUG*FT2">12871124.0727</izz>
    <ixz unit="SLUG*FT2">0.00</ixz>
    <iyz unit="SLUG*FT2">0.00</iyz>
    <ixy unit="SLUG*FT2">0.00</ixy>
    <emptywt unit="LBS">254100</emptywt>
    <location name="CG" unit="FT">
      <x>62.59203</x>
      <y>0.00</y>
      <z>7.392472</z>
    </location>
    <pointmass name="Engine0">
      <location unit="FT">
	<x>53.2388</x>
	<y>-45.7608</y>
	<z>-1.13525</z>
      </location>
      <weight unit="LBS">7100</weight>
    </pointmass>
    <pointmass name="Engine1">
      <location unit="FT">
	<x>42.7388</x>
	<y>-24.4306</y>
	<z>1.36476</z>
      </location>
      <weight unit="LBS">7100</weight>
    </pointmass>
    <pointmass name="Engine2">
      <location unit="FT">
	<x>42.7388</x>
	<y>24.4306</y>
	<z>1.36476</z>
      </location>
      <weight unit="LBS">7100</weight>
    </pointmass>
    <pointmass name="Engine3">
      <location unit="FT">
	<x>53.2388</x>
	<y>45.7608</y>
	<z>-1.13525</z>
      </location>
      <weight unit="LBS">7100</weight>
    </pointmass>
    <pointmass name="CargoBay">
      <location unit="M">
	<x>18.00</x>
	<y>0.00</y>
	<z>-2.20</z>
      </location>
      <weight unit="LBS">0</weight>
    </pointmass>
  </mass_balance>

  <ground_reactions name="CONTACTS: C-17" file="Aero/C-17-groundReactions.xml" />
  <propulsion name="POWER: C-17" file="Aero/C-17-propulsion.xml" />
  <flight_control name="FCS: C-17" file="Aero/C-17-flightControl.xml" />
  <aerodynamics name="AERO: C-17" file="Aero/C-17-aerodynamics.xml" />

  <system name="PAYLOAD: C-17" file="Systems/cargobay-loading.xml" />

  <system name="LIVERY: C-17" file="Systems/livery-updating.xml" />

  <output name="C-17-jsbim-output.csv" type="CSV" rate="100">
    <simulation>OFF</simulation>
    <atmosphere>OFF</atmosphere>
    <massprops>OFF</massprops>
    <aerosurfaces>OFF</aerosurfaces>
    <rates>OFF</rates>
    <velocities>OFF</velocities>
    <forces>OFF</forces>
    <moments>OFF</moments>
    <position>OFF</position>
    <coefficients>OFF</coefficients>
    <ground_reactions>OFF</ground_reactions>
    <fcs>OFF</fcs>
    <propulsion>OFF</propulsion>
  </output>
</fdm_config>
